*Heading
** Job name: Buckling_job_6_1 Model name: Model-1
** Generated by: Abaqus/CAE 2019
*Preprint, echo=NO, model=NO, history=NO, contact=NO
**
** PARTS
**
*Part, name=Part-1
*Node
      1,   75.0954056,        1524.,   126.451935
      2,       -1524.,    778.32959,   126.451935
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*Element, type=C3D4
    1, 6686, 4288, 1098, 4287
    2, 6686,  642, 4289,  324
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*Nset, nset=fibre_set1, generate
    1,  7587,     1
*Elset, elset=fibre_set1, generate
     1,  20952,      1
*Nset, nset=fibre_set2, generate
  7588,  17249,      1
*Elset, elset=fibre_set2, generate
 20953,  41689,      1
*Nset, nset=fibre_set5, generate
 17250,  24416,      1
*Elset, elset=fibre_set5, generate
 41690,  61576,      1
** Section: fibre_section
*Solid Section, elset=fibre_set1, material=fibre_material
,
** Section: fibre_section
*Solid Section, elset=fibre_set2, material=fibre_material
,
** Section: fibre_section
*Solid Section, elset=fibre_set5, material=fibre_material
,
*End Part
**
**
** ASSEMBLY
**
*Assembly, name=Assembly
**
*Instance, name=Part-1-1, part=Part-1
*End Instance
**
*Node
      1,           0.,        1524.,         127.
*Node
      2,           0.,       -1524.,         127.
*Nset, nset=_PickedSet19, internal
 1,
*Nset, nset=_PickedSet21, internal
 2,
** Constraint: Constraint-1
*Rigid Body, ref node=_PickedSet19, pin nset=top_set_pin
** Constraint: Constraint-2
*Rigid Body, ref node=_PickedSet21, pin nset=bottom_set_pin
*End Assembly
**
** MATERIALS
**
*Material, name=fibre_material
*Elastic
121000., 0.34
*Material, name=matrix_material
*Elastic
 426.593, 0.29
** ----------------------------------------------------------------
**
** STEP: Step-1
**
*Step, name=Step-1, nlgeom=NO, perturbation
*Buckle
3, , 6, 300
**
** BOUNDARY CONDITIONS
**
** Name: BC-1 Type: Symmetry/Antisymmetry/Encastre
*Boundary, op=NEW, load case=1
bottom_set_pin, ENCASTRE
*Boundary, op=NEW, load case=2
bottom_set_pin, ENCASTRE
** Name: BC-2 Type: Displacement/Rotation
*Boundary, op=NEW, load case=1
top_set_pin, 1, 1
top_set_pin, 3, 3
*Boundary, op=NEW, load case=2
top_set_pin, 1, 1
top_set_pin, 3, 3
**
** LOADS
**
** Name: Load-1   Type: Pressure
*Dsload
top_surface, P, 1.
**
** OUTPUT REQUESTS
**
*Restart, write, frequency=0
**
** FIELD OUTPUT: F-Output-1
**
*Output, field, variable=PRESELECT
*End Step
